<?xml version="1.0"?>
<!--?xml-stylesheet type="text/xsl" href="http://jsbsim.sourceforge.net/JSBSim.xsl"?-->

<fdm_config name="c46" version="2.0" release="BETA"
   xmlns:xsi="http://www.w3.org/2001/XMLSchema-instance"
   xsi:noNamespaceSchemaLocation="http://jsbsim.sourceforge.net/JSBSim.xsd">

 <fileheader>
  <author>Arnd Lebert @ Aeromatic v 3.3.9 </author>
  <filecreationdate> 18 Feb 2017 </filecreationdate>
  <version>201703$Revision: 1.77 $</version>
  <description> Models a c46. </description>
 </fileheader>
<!--Note: Source for most of the data here: Northland Air Manitoba - Pilots Operating Handbook
      Chapter:Section:Subject, Page-->
<!--
  File:     c46.xml
  Inputs:
    name:          c46
    type:          Multi-engine Propeller Airliner, Propeller Transport
    stall speed:   78.00kts
    max weight:    45008.46 lb
    length:        76.35 ft
    wing:
     span:         107.97 ft
     area:         1359.48 sq-ft
     mean chord:   12.30 ft
     aspect ratio: 8.51:1
     taper ratio:  0.36:1
     incidence:    5.10 degrees
     dihedral:     4.80 degrees
     sweep:        0.00 degrees

    no. engines:   2
    engine type:   Piston Engine
    engine layout: wings

    control type:   Conventional with Yaw Damper

    gear type:     taildragger
    steering type: steering
    retractable?:  yes

  Outputs:
    wing loading:       33.11 lb/sq-ft
     - thickness ratio: 52.66%
    payload:            1162.81 lbs
    CL-alpha:           13.79 per radian
    CL-0:               0.30
    CL-max:             1.61
    CD-0:               0.05
    K:                  0.04
    Mcrit:              0.70
-->
 <metrics><!--4:6:5, 78-81-->
   <wingarea  unit="FT2">  1359.48 </wingarea><!--includingAlerons-->
   <wingspan  unit="FT" >   108.97 </wingspan>
   <wing_incidence unit="DEG"> 5.10 </wing_incidence>
   <chord     unit="FT" >    12.30 </chord><!--16.6(root) to 5.6(tips)-->
   <htailarea unit="FT2">   307.96 </htailarea><!--181.48/ total(+elevators): 307.96/ aeromatic: 217.67-->
   <htailarm  unit="FT" >    41.11 </htailarm>
   <vtailarea  unit="FT2">  165.0 </vtailarea><!--stab+rudder=112.2+52.8=165.0--><!--154.57-->
   <vtailarm  unit="FT" >    41.11 </vtailarm>
   <location name="AERORP" unit="M">
     <x>  9.00 </x>
     <y>  0.00 </y>
     <z>  0.00 </z>
   </location>
   <location name="EYEPOINT" unit="M">
     <x>  0.00 </x>
     <y>  0.00 </y>
     <z>  0.00 </z>
   </location>
   <location name="VRP" unit="M">
     <x>    12.0 </x>
     <y>     0.0 </y>
     <z>     0.0 </z>
   </location>
 </metrics>

 <mass_balance>
   <ixx unit="SLUG*FT2">  375051.81 </ixx>
   <iyy unit="SLUG*FT2">  53481.37 </iyy>
   <izz unit="SLUG*FT2">  869316.50 </izz>
   <emptywt unit="LBS" >  32413.50 </emptywt>
   <location name="CG" unit="M">
     <x>    8.87 </x>
     <y>    0.00 </y>
     <z>   -0.83 </z>
   </location>
   <pointmass name="Payload"> <!-- n=0 - "Cargo" in payload.xml -->
    <description> 1162.81 LBS should bring model up to entered max weight </description>
    <weight unit="LBS"> 581.41 </weight>
    <location name="POINTMASS" unit="M">
     <x> 10 </x>
     <y> 0.00 </y>
     <z> 0 </z>
   </location>
  </pointmass>
  <pointmass name="Pilot"> <!-- n=1 -->
    <description></description>
    <weight unit="LBS"> 185.00 </weight>
    <location name="POINTMASS" unit="M">
     <x> 1.5 </x>
     <y> 0.25 </y>
     <z> 0 </z>>
   </location>
  </pointmass>
  <pointmass name="CoPilot"> <!-- n=2 -->
    <description></description>
    <weight unit="LBS"> 185.00 </weight>
    <location name="POINTMASS" unit="M">
     <x> 1.5 </x>
     <y> -0.25 </y>
     <z> 0 </z>
   </location>
  </pointmass>
 </mass_balance>

 <propulsion>
<!--    #    #    #    #    E N G I N E  +  P R O P    -->
   <engine file="PrattWhitneyR2800DoubleWasp">
    <location unit="M">
      <x>   3.86 </x>
      <y>  -3.935 </y>
      <z>   -1.71 </z>
    </location>
    <orient unit="DEG">
      <pitch>     0.00 </pitch>
       <roll>     0.00 </roll>
        <yaw>     0.00 </yaw>
    </orient>
    <!-- 9 Jul 18 - changed from "0" - needs to be set here until we get fuel system completed -->
	<feed>6</feed>
	<!--<feed>2</feed>-->


    <thruster file="HamiltonStandard3Blade">
     <sense> 1 </sense>
     <location unit="M">
       <x>   3.86 </x>
       <y>  -3.935 </y>
       <z>   -1.71 </z>
     </location>
     <orient unit="DEG">
       <pitch>     0.00 </pitch>
        <roll>     0.00 </roll>
         <yaw>     0.00 </yaw>
     </orient>
    </thruster>
  </engine>

   <engine file="PrattWhitneyR2800DoubleWasp">
    <location unit="M">
      <x>   3.86 </x>
      <y>   3.935 </y>
      <z>   -1.71 </z>
    </location>
    <orient unit="DEG">
      <pitch>     0.00 </pitch>
       <roll>     0.00 </roll>
        <yaw>     0.00 </yaw>
    </orient>
    <!-- 9 Jul 18 - changed from "1" - needs to be set here until we get fuel system completed -->
	<feed>7</feed>
	<!--<feed>3</feed>-->

    <thruster file="HamiltonStandard3Blade">
     <sense> 1 </sense>
     <location unit="M">
       <x>   3.86 </x>
       <y>   3.935 </y>
       <z>   -1.71 </z>
     </location>
     <orient unit="DEG">
       <pitch>     0.00 </pitch>
        <roll>     0.00 </roll>
         <yaw>     0.00 </yaw>
     </orient>
    </thruster>
  </engine>

<!--  #   #   #   #   F U E L   T A N K S  #   #   #   #   -->
<!-- Original Configuration
  <tank type="FUEL" number="0">
     <location unit="M">
       <x>   8.87 </x>
       <y>   0.00 </y>
       <z>   0.00 </z>
     </location>
     <capacity unit="LBS"> 3810.72 </capacity>
     <contents unit="LBS"> 1905.36 </contents>
  </tank>
  <tank type="FUEL" number="1">
     <location unit="M">
       <x>   9.37 </x>
       <y>   0.00 </y>
       <z>   0.00 </z>
     </location>
     <capacity unit="LBS"> 3810.72 </capacity>
     <contents unit="LBS"> 1905.36 </contents>
  </tank>
  <tank type="FUEL" number="2">
     <location unit="M">
       <x>   9.37 </x>
       <y>   0.00 </y>
       <z>   0.00 </z>
     </location>
     <capacity unit="LBS"> 3810.72 </capacity>
     <contents unit="LBS"> 1905.36 </contents>
  </tank> -->

  <!-- 9 Jul 18 - Updated configuration using DC3 model and JSBSim tutorial -->
  <!-- 1422 gallons total - not sure about the unusable exactly -->
  <!-- Engines are fed from simulated "collector" tanks, 6 and 7 -->

  <tank type="FUEL" number="0"> <!-- Aft left - 175 gal at full -->
     <location unit="M">
       <x>10.0</x>
       <y>-7.15</y>
       <z>-1.5</z>
     </location>
     <capacity unit="LBS">1085.00</capacity>
     <contents unit="LBS">1085</contents>
  </tank>

  <tank type="FUEL" number="1"> <!-- Aft right - 175 gal at full -->
     <location unit="M">
       <x>10.0</x>
       <y>7.15</y>
       <z>-1.5</z>
     </location>
     <capacity unit="LBS">1085.00</capacity>
     <contents unit="LBS">1085</contents>
  </tank>

  <tank type="FUEL" number="2"> <!-- Center left - 292 gal at full -->
     <location unit="M">
       <x>8.95</x>
       <y>-7.15</y>
       <z>-1.5</z>
     </location>
     <capacity unit="LBS">1810.42</capacity>
     <contents unit="LBS">1810</contents>
  </tank>

  <tank type="FUEL" number="3"> <!-- Center right - 292 gal at full -->
     <location unit="M">
       <x>8.95</x>
       <y>7.15</y>
       <z>-1.5</z>
     </location>
     <capacity unit="LBS">1810.42</capacity>
     <contents unit="LBS">1810</contents>
  </tank>

  <tank type="FUEL" number="4"> <!-- Fwd left - 244 gal at full -->
     <location unit="M">
       <x>7.825</x>
       <y>-7.15</y>
       <z>-1.5</z>
     </location>
     <capacity unit="LBS">1512.80</capacity>
     <contents unit="LBS">1512</contents>
  </tank>

  <tank type="FUEL" number="5"> <!-- Fwd right - 244 gal at full -->
     <location unit="M">
       <x>7.825</x>
       <y>7.15</y>
       <z>-1.5</z>
     </location>
     <capacity unit="LBS">1512.80</capacity>
     <contents unit="LBS">1512</contents>
  </tank>

  <!-- see /Systems/fuel.xml for details on how these are fed -->
  <tank type="FUEL" number="6"> <!-- Collector - left engine - .5 gal at full -->
     <location unit="M">
       <x>3.749</x>
       <y>-2.341</y>
       <z>-1.258</z>
     </location>
     <capacity unit="LBS">0.5</capacity>
     <contents unit="LBS">0</contents>
     <priority>0</priority>
     <hidden type="bool">true</hidden>
  </tank>

  <tank type="FUEL" number="7"> <!-- Collector - right engine - .5 gal at full -->
     <location unit="M">
       <x>3.749</x>
       <y>2.341</y>
       <z>-1.258</z>
     </location>
     <capacity unit="LBS">0.5</capacity>
     <contents unit="LBS">0</contents>
     <priority>0</priority>
     <hidden type="bool">true</hidden>
  </tank>

  <!-- ***************** Long Range Tanks - Optional equipment in cargo area ********************** -->
  <!-- Each "tank" was a 100 gallon barrel, connected to a central valve in the cargo area to the fuel system. -->
  <!--
  <tank type="FUEL" number="21">
     <location unit="M">
       <x>8.0</x>
       <y>0</y>
       <z>0.25</z>
     </location>
     <capacity unit="LBS">600</capacity>
     <contents unit="LBS">600</contents>
     <priority>0</priority>
     <hidden type="bool">false</hidden>
  </tank>

  <tank type="FUEL" number="22">
     <location unit="M">
       <x>3.749</x>
       <y>2.341</y>
       <z>-1.258</z>
     </location>
     <capacity unit="LBS">600</capacity>
     <contents unit="LBS">600</contents>
     <priority>0</priority>
     <hidden type="bool">true</hidden>
  </tank>

  <tank type="FUEL" number="23">
     <location unit="M">
       <x>3.749</x>
       <y>2.341</y>
       <z>-1.258</z>
     </location>
     <capacity unit="LBS">600</capacity>
     <contents unit="LBS">600</contents>
     <priority>0</priority>
     <hidden type="bool">true</hidden>
  </tank>

  <tank type="FUEL" number="24">
     <location unit="M">
       <x>3.749</x>
       <y>2.341</y>
       <z>-1.258</z>
     </location>
     <capacity unit="LBS">600</capacity>
     <contents unit="LBS">600</contents>
     <priority>0</priority>
     <hidden type="bool">true</hidden>
  </tank>

  <tank type="FUEL" number="25">
     <location unit="M">
       <x>3.749</x>
       <y>2.341</y>
       <z>-1.258</z>
     </location>
     <capacity unit="LBS">600</capacity>
     <contents unit="LBS">600</contents>
     <priority>0</priority>
     <hidden type="bool">true</hidden>
  </tank>

  <tank type="FUEL" number="26">
     <location unit="M">
       <x>3.749</x>
       <y>2.341</y>
       <z>-1.258</z>
     </location>
     <capacity unit="LBS">600</capacity>
     <contents unit="LBS">600</contents>
     <priority>0</priority>
     <hidden type="bool">true</hidden>
  </tank>

  <tank type="FUEL" number="27">
     <location unit="M">
       <x>3.749</x>
       <y>2.341</y>
       <z>-1.258</z>
     </location>
     <capacity unit="LBS">600</capacity>
     <contents unit="LBS">600</contents>
     <priority>0</priority>
     <hidden type="bool">true</hidden>
  </tank>

  <tank type="FUEL" number="28">
     <location unit="M">
       <x>3.749</x>
       <y>2.341</y>
       <z>-1.258</z>
     </location>
     <capacity unit="LBS">600</capacity>
     <contents unit="LBS">600</contents>
     <priority>0</priority>
     <hidden type="bool">true</hidden>
  </tank>

  <tank type="FUEL" number="29">
     <location unit="M">
       <x>3.749</x>
       <y>2.341</y>
       <z>-1.258</z>
     </location>
     <capacity unit="LBS">600</capacity>
     <contents unit="LBS">600</contents>
     <priority>0</priority>
     <hidden type="bool">true</hidden>
  </tank>

  <tank type="FUEL" number="30">
     <location unit="M">
       <x>3.749</x>
       <y>2.341</y>
       <z>-1.258</z>
     </location>
     <capacity unit="LBS">600</capacity>
     <contents unit="LBS">600</contents>
     <priority>0</priority>
     <hidden type="bool">true</hidden>
  </tank>
  -->
 </propulsion>


 <ground_reactions>
  <!--MAIN GEAR LEFT-->
  <contact type="BOGEY" name="LEFT_MAIN">
    <location unit="M">
      <x>   7.13 </x>
      <y>  -3.98 </y>
      <z>  -4.8 </z>
    </location>
    <static_friction>  0.80 </static_friction>
    <dynamic_friction> 0.50 </dynamic_friction>
    <rolling_friction> 0.02 </rolling_friction>
    <spring_coeff  unit="LBS/FT">     100008.46 </spring_coeff><!--45008.46-->
    <damping_coeff unit="LBS/FT/SEC"> 22504.23 </damping_coeff>
    <max_steer unit="DEG">0</max_steer>
    <brake_group> LEFT </brake_group>
    <retractable> 1 </retractable>
  </contact>

  <!--MAIN GEAR RIGHT-->
  <contact type="BOGEY" name="RIGHT_MAIN">
    <location unit="M">
      <x>   7.13 </x>
      <y>   3.98 </y>
      <z>  -4.8 </z>
    </location>
    <static_friction>  0.80 </static_friction>
    <dynamic_friction> 0.50 </dynamic_friction>
    <rolling_friction> 0.02 </rolling_friction>
    <spring_coeff  unit="LBS/FT">     100008.46 </spring_coeff>
    <damping_coeff unit="LBS/FT/SEC"> 22504.23 </damping_coeff>
    <max_steer unit="DEG">0</max_steer>
    <brake_group> RIGHT </brake_group>
    <retractable> 1 </retractable>
  </contact>

<!-- TAIL GEAR -->
  <contact type="BOGEY" name="TAIL">
    <location unit="M">
      <x>   19.45 </x>
      <y>    0.00 </y>
      <z>   -2.69 </z>
    </location>
    <static_friction>  0.80 </static_friction>
    <dynamic_friction> 0.50 </dynamic_friction>
    <rolling_friction> 0.05 </rolling_friction>
    <spring_coeff  unit="LBS/FT">     45008.46 </spring_coeff>
    <damping_coeff unit="LBS/FT/SEC"> 2504.23 </damping_coeff><!--aeromatic had 22504.23, but it bounces-->
    <damping_coeff_rebound unit="LBS/FT/SEC">2500</damping_coeff_rebound>
    <max_steer unit="DEG"> 360 </max_steer>
    <brake_group>NONE</brake_group>
    <retractable> 1 </retractable>
  </contact>

  <contact type="STRUCTURE" name="LEFT_WING">
    <location unit="M">
     <x>    9.48 </x>
     <y>  -16.49 </y>
     <z>   -0.15 </z>
    </location>
   <static_friction>  1 </static_friction>
   <dynamic_friction> 1 </dynamic_friction>
   <spring_coeff unit="LBS/FT">      45008.46 </spring_coeff>
   <damping_coeff unit="LBS/FT/SEC"> 45008.46 </damping_coeff>
  </contact>

  <contact type="STRUCTURE" name="RIGHT_WING">
    <location unit="M">
     <x>    9.48 </x>
     <y>   16.49 </y>
     <z>   -0.15 </z>
    </location>
   <static_friction>  1 </static_friction>
   <dynamic_friction> 1 </dynamic_friction>
   <spring_coeff unit="LBS/FT">      45008.46 </spring_coeff>
   <damping_coeff unit="LBS/FT/SEC"> 45008.46 </damping_coeff>
  </contact>

 </ground_reactions>

 <!-- *** Additional System files *** -->

 <system file="fuel.xml"/>
 <!-- <system file="pitot-static.xml"/> -->
 <!-- <system file="vacuum.xml"/> -->
 <system file="Propulsion.xml"/>
 <system file="Aircraft control.xml"/>
 <system file="Landing Gear.xml"/>
 <system file="Flaps.xml"/>
 <system file="tail-wheel"/>
 <system file="Oilcooler.xml"/>

 <systems>
    <path>/pitot-static.xml</path>
 </systems>

 <flight_control name="FCS: c46">
 </flight_control>

 <aerodynamics>

  <axis name="LIFT">

    <function name="aero/force/Lift_propwash">
      <description>Delta lift due to propeller induced velocity</description>
      <product>
         <property>systems/propulsion/thrust-coefficient</property>
          <property>aero/qbar-psf</property>
          <property>metrics/Sw-sqft</property>
          <table>
            <independentVar lookup="row">aero/alpha-rad</independentVar>
            <independentVar lookup="column">fcs/flap-pos-deg</independentVar>
            <tableData>
                     0.0     60.0
              -0.37  0.000   0.000
               0.00  0.036   0.095
               0.10  0.191   0.508
               0.20  0.000   0.000
            </tableData>
          </table>
      </product>
    </function>

    <!-- Lift above 0.85 and below -0.85 is generalised -->
    <function name="aero/force/Lift_alpha">
      <description>Lift due to alpha</description>
      <product>
          <property>aero/qbar-psf</property>
          <property>metrics/Sw-sqft</property>
          <table>
            <independentVar lookup="row">aero/alpha-rad</independentVar>
            <tableData>
              -1.57  0.0000
              -1.22 -0.3043
              -1.05 -0.4099
              -0.88 -0.4734
              -0.62 -0.5223
              -0.12 -1.3058
               0.00  0.3014
               0.09  1.6072
               0.60  0.8238
               0.88  1.5266
               1.05  1.3221
               1.22  0.9813
               1.57  0.0000
            </tableData>
          </table>
      </product>
    </function>

    <function name="aero/force/Lift_pitch_rate">
        <description>Lift due to pitch rate</description>
        <product>
          <property>aero/qbar-psf</property>
          <property>metrics/Sw-sqft</property>
          <property>velocities/q-aero-rad_sec</property>
          <property>aero/ci2vel</property>
          <value> 4.4195 </value>
        </product>
      </function>

      <function name="aero/force/Lift_alpha_rate">
        <description>Lift due to alpha rate</description>
        <product>
           <property>aero/qbar-psf</property>
           <property>metrics/Sw-sqft</property>
           <property>aero/alphadot-rad_sec</property>
           <property>aero/ci2vel</property>
           <value> 1.6820 </value>
        </product>
      </function>

    <function name="aero/force/Lift_elevator">
       <description>Lift due to Elevator Deflection</description>
       <product>
           <property>aero/qbar-psf</property>
           <property>metrics/Sw-sqft</property>
           <property>fcs/elevator-pos-rad</property>
           <value> 0.4294 </value>
       </product>
    </function>

    <function name="aero/force/Lift_flap">
       <description>Delta Lift due to flaps</description>
       <product>
           <property>aero/qbar-psf</property>
           <property>metrics/Sw-sqft</property>
           <property>fcs/flap-pos-deg</property>
           <value> 0.0184 </value>
       </product>
    </function>


  </axis>

  <axis name="DRAG">

    <!-- CD0 is based on fuselage, wing, horizontal- en vertical tail -->
    <!-- Antennas, struts and wires are not taken into account        -->
    <!-- CD for gear (fixed and retractable) is defined below         -->
    <function name="aero/force/Drag_minimum">
       <description>Minimum drag</description>
       <product>
          <property>aero/qbar-psf</property>
          <property>metrics/Sw-sqft</property>
          <value> 0.0509 </value>
       </product>
    </function>

    <function name="aero/force/Drag_alpha">
       <description>Drag due to alpha</description>
       <product>
          <property>aero/qbar-psf</property>
          <property>metrics/Sw-sqft</property>
          <table>
            <independentVar lookup="row">aero/alpha-rad</independentVar>
            <tableData>
             -1.57    1.4082
             -0.09    0.0294
              0.00    0.0000
              0.09    0.0294
              1.57    1.4082
            </tableData>
          </table>
       </product>
    </function>

    <function name="aero/force/Drag_induced">
       <description>Induced drag</description>
         <product>
           <property>aero/qbar-psf</property>
           <property>metrics/Sw-sqft</property>
           <property>aero/cl-squared</property>
           <value> 0.0374 </value>
         </product>
    </function>

    <function name="aero/force/Drag_mach">
       <description>Drag due to mach</description>
        <product>
          <property>aero/qbar-psf</property>
          <property>metrics/Sw-sqft</property>
          <table>
            <independentVar lookup="row">velocities/mach</independentVar>
            <tableData>
                0.00    0.0000
                0.70    0.0000
                1.10    0.0230
                1.80    0.0150
            </tableData>
          </table>
        </product>
    </function>

    <function name="aero/force/Drag_beta">
       <description>Drag due to sideslip</description>
       <product>
          <property>aero/qbar-psf</property>
          <property>metrics/Sw-sqft</property>
          <table>
            <independentVar lookup="row">aero/beta-rad</independentVar>
            <tableData>
              -1.57    1.2300
              -0.26    0.0500
               0.00    0.0000
               0.26    0.0500
               1.57    1.2300
            </tableData>
          </table>
       </product>
    </function>

    <function name="aero/force/Drag_elevator">
       <description>Drag due to Elevator Deflection</description>
       <product>
           <property>aero/qbar-psf</property>
           <property>metrics/Sw-sqft</property>
           <abs><property>fcs/elevator-pos-rad</property></abs>
           <value> 0.0400 </value>
       </product>
    </function>

    <function name="aero/force/Drag_gear">
       <description>Drag due to gear</description>
         <product>
           <property>aero/qbar-psf</property>
           <property>metrics/Sw-sqft</property>
           <property>gear/gear-pos-norm</property>
           <value> 0.0230 </value>
         </product>
    </function>

    <function name="aero/force/Drag_flap">
       <description>Drag due to flaps</description>
         <product>
           <property>aero/qbar-psf</property>
           <property>metrics/Sw-sqft</property>
           <property>fcs/flap-pos-deg</property>
           <value> 0.0011 </value>
         </product>
    </function>


  </axis>

  <axis name="SIDE">

    <function name="aero/force/Side_beta">
       <description>Side force due to beta</description>
       <product>
           <property>aero/qbar-psf</property>
           <property>metrics/Sw-sqft</property>
           <property>aero/beta-rad</property>
           <value> -0.5361 </value>
       </product>
    </function>
    <function name="aero/force/Side_roll_rate">
       <description>Side force due to roll rate</description>
       <product>
           <property>aero/qbar-psf</property>
           <property>metrics/Sw-sqft</property>
           <property>aero/bi2vel</property>
           <property>velocities/p-aero-rad_sec</property>
           <table>
             <independentVar lookup="row">aero/Re</independentVar>
             <tableData>
                10322178   0.3011
                11354395   0.0225
                15483266   0.0100
                20586226   0.0056
             </tableData>
           </table>
       </product>
    </function>

    <function name="aero/force/Side_yaw_rate">
       <description>Side force due to yaw rate</description>
       <product>
           <property>aero/qbar-psf</property>
           <property>metrics/Sw-sqft</property>
           <property>aero/bi2vel</property>
           <property>velocities/r-aero-rad_sec</property>
           <value> 0.4082 </value>
       </product>
    </function>

    <function name="aero/force/Side_rudder">
       <description>Side force due to rudder</description>
       <product>
           <property>aero/qbar-psf</property>
           <property>metrics/Sw-sqft</property>
           <property>fcs/rudder-pos-rad</property>
           <value> 0.1599 </value>
       </product>
    </function>

  </axis>

  <axis name="PITCH">

    <function name="aero/moment/Pitch_propwash">
      <description>Pitch moment due to propeller induced velocity</description>
      <product>
         <property>systems/propulsion/thrust-coefficient</property>
          <property>aero/qbar-psf</property>
          <property>metrics/Sw-sqft</property>
          <property>metrics/bw-ft</property>
          <table>
            <independentVar lookup="row">aero/alpha-rad</independentVar>
            <independentVar lookup="column">fcs/flap-pos-deg</independentVar>
            <tableData>
                     0.0     60.0
              -0.01  0.000   0.000
               0.00 -0.019  -0.051
               0.10 -0.102  -0.272
               0.13  0.000   0.000
            </tableData>
          </table>
      </product>
    </function>

    <function name="aero/moment/Pitch_alpha">
       <description>Pitch moment due to alpha</description>
       <product>
           <property>aero/qbar-psf</property>
           <property>metrics/Sw-sqft</property>
           <property>metrics/cbarw-ft</property>
           <property>aero/alpha-rad</property>
           <value> -1.4144 </value>
       </product>
    </function>

    <function name="aero/moment/Pitch_elevator">
       <description>Pitch moment due to elevator</description>
       <product>
          <property>aero/qbar-psf</property>
          <property>metrics/Sw-sqft</property>
          <property>metrics/cbarw-ft</property>
          <property>fcs/elevator-pos-rad</property>
          <table>
            <independentVar lookup="row">velocities/mach</independentVar>
            <tableData>
              0.0    -1.4066
              2.0    -0.3516
            </tableData>
          </table>
       </product>
    </function>

    <function name="aero/moment/Pitch_damp">
       <description>Pitch moment due to pitch rate</description>
       <product>
           <property>aero/qbar-psf</property>
           <property>metrics/Sw-sqft</property>
           <property>metrics/cbarw-ft</property>
           <property>aero/ci2vel</property>
           <property>velocities/q-aero-rad_sec</property>
           <value> -14.7653 </value>
       </product>
    </function>

    <function name="aero/moment/Pitch_alphadot">
       <description>Pitch moment due to alpha rate</description>
       <product>
           <property>aero/qbar-psf</property>
           <property>metrics/Sw-sqft</property>
           <property>metrics/cbarw-ft</property>
           <property>aero/ci2vel</property>
           <property>aero/alphadot-rad_sec</property>
           <value> -5.6195 </value>
       </product>
    </function>

  </axis>

  <axis name="ROLL">

    <function name="aero/moment/Roll_differential_propwash">
       <description>Roll moment due to differential propwash</description>
       <product>
           <property>systems/propulsion/thrust-coefficient-left-right</property>
           <property>aero/qbar-psf</property>
           <property>metrics/Sw-sqft</property>
           <property>metrics/bw-ft</property>
           <property>aero/alpha-rad</property>
           <value> -4.2267 </value>
       </product>
    </function>

    <function name="aero/moment/Roll_beta">
       <description>Roll moment due to beta</description>
       <product>
           <property>aero/qbar-psf</property>
           <property>metrics/Sw-sqft</property>
           <property>metrics/bw-ft</property>
           <property>aero/beta-rad</property>
           <table>
             <independentVar lookup="row">aero/alpha-rad</independentVar>
             <independentVar lookup="column">aero/Re</independentVar>
             <tableData>
                         10322178 11354395 15483266 20586226
                 -0.0349  -0.2868  -0.2443  -0.2424  -0.2417
                  0.3491  -0.2868  -0.2443  -0.2424  -0.2417
             </tableData>
           </table>
       </product>
    </function>

    <function name="aero/moment/Roll_damp">
       <description>Roll moment due to roll rate</description>
       <product>
           <property>aero/qbar-psf</property>
           <property>metrics/Sw-sqft</property>
           <property>metrics/bw-ft</property>
           <property>aero/bi2vel</property>
           <property>velocities/p-aero-rad_sec</property>
           <value> -1.5495 </value>
       </product>
    </function>

    <function name="aero/moment/Roll_yaw">
       <description>Roll moment due to yaw rate</description>
       <product>
           <property>aero/qbar-psf</property>
           <property>metrics/Sw-sqft</property>
           <property>metrics/bw-ft</property>
           <property>aero/bi2vel</property>
           <property>velocities/r-aero-rad_sec</property>
           <table>
             <independentVar lookup="row">aero/alpha-rad</independentVar>
             <independentVar lookup="column">aero/Re</independentVar>
             <tableData>
                         10322178 11354395 15483266 20586226
                 -0.0349  -0.0488  -0.0488  -0.0488  -0.0488
                  0.3491   4.0143   1.2749   1.2749   1.2749
             </tableData>
           </table>
       </product>
    </function>

    <function name="aero/moment/Roll_aileron">
       <description>Roll moment due to aileron</description>
       <product>
          <property>aero/qbar-psf</property>
          <property>metrics/Sw-sqft</property>
          <property>metrics/bw-ft</property>
          <property>fcs/left-aileron-pos-rad</property>
           <table>
            <independentVar lookup="row">velocities/mach</independentVar>
            <tableData>
              0.0    0.1500
              2.0    0.0375
            </tableData>
          </table>
       </product>
    </function>

    <function name="aero/moment/Roll_rudder">
       <description>Roll moment due to rudder</description>
       <product>
           <property>aero/qbar-psf</property>
           <property>metrics/Sw-sqft</property>
           <property>metrics/bw-ft</property>
           <property>fcs/rudder-pos-rad</property>
           <value> 0.0100 </value>
       </product>
    </function>

  </axis>

  <axis name="YAW">

    <!-- Stall initiator -->
    <function name="aero/moment/Yaw_alpha">
       <description>Yaw moment due to alpha</description>
       <product>
           <property>aero/qbar-psf</property>
           <property>metrics/Sw-sqft</property>
           <property>metrics/bw-ft</property>
           <property>aero/alpha-rad</property>
           <property>fcs/gear-no-wow</property>
           <table>
             <independentVar lookup="row">aero/beta-rad</independentVar>
             <independentVar lookup="column">aero/Re</independentVar>
             <tableData>
                         10322178 11354395
                 -0.3491  -1.0000   0.0000
                  0.3491   1.0000   0.0000
             </tableData>
           </table>
       </product>
    </function>

    <function name="aero/moment/Yaw_beta">
       <description>Yaw moment due to beta</description>
       <product>
           <property>aero/qbar-psf</property>
           <property>metrics/Sw-sqft</property>
           <property>metrics/bw-ft</property>
           <property>aero/beta-rad</property>
           <value> 0.0981 </value>
       </product>
    </function>

    <function name="aero/moment/Yaw_roll_rate">
       <description>Yaw moment due to roll rate</description>
       <product>
           <property>aero/qbar-psf</property>
           <property>metrics/Sw-sqft</property>
           <property>metrics/bw-ft</property>
           <property>aero/bi2vel</property>
           <property>velocities/p-rad_sec</property>
           <table>
             <independentVar lookup="row">aero/Re</independentVar>
             <tableData>
                10322178  -0.1146
                11354395  -0.0086
                15483266  -0.0038
                20586226  -0.0022
             </tableData>
           </table>
       </product>
    </function>

    <function name="aero/moment/Yaw_damp">
       <description>Yaw moment due to yaw rate</description>
       <product>
           <property>aero/qbar-psf</property>
           <property>metrics/Sw-sqft</property>
           <property>metrics/bw-ft</property>
           <property>aero/bi2vel</property>
           <property>velocities/r-aero-rad_sec</property>
           <value> -0.1308 </value>
       </product>
    </function>

    <function name="aero/moment/Yaw_rudder">
       <description>Yaw moment due to rudder</description>
       <product>
           <property>aero/qbar-psf</property>
           <property>metrics/Sw-sqft</property>
           <property>metrics/bw-ft</property>
           <property>fcs/rudder-pos-rad</property>
           <value> -0.0609 </value>
       </product>
    </function>

    <function name="aero/moment/Yaw_aileron">
       <description>Adverse yaw</description>
       <product>
           <property>aero/qbar-psf</property>
           <property>metrics/Sw-sqft</property>
           <property>metrics/bw-ft</property>
           <property>fcs/left-aileron-pos-rad</property>
           <value> -0.0080 </value>
       </product>
    </function>

  </axis>

 </aerodynamics>

 <external_reactions>
 </external_reactions>

</fdm_config>
